# OpenSim document version 40000
JointModelPersonalizationTool:
  input_model_file: Rajagopal_4.0_RCNL_markers_scaled.osim
  output_model_file: Rajagopal_4.0_RCNL_markers_scaled_all_isolated.osim
  allowable_error: 0.01
  accuracy: 1e-6
  diff_min_change: 1e-4
  optimality_tolerance: 1e-6
  function_tolerance: 1e-6
  step_tolerance: 1e-6
  max_function_evaluations: 3e3
  JMPTaskList:
    JMPTask [values shared by the 6 below unless stated]: is_enabled=true time_range=(0.333 1.86)
    JMPTask Left Ankle: index=1 marker_file_name=trc/l_ankle.trc
      JMPJointSet:
        JMPJoint ankle_l:
          parent_frame_transformation: translation=(true true false) orientation=(true true false)
              translation_bounds=0.1 orientation_bounds=1 [radians]
          child_frame_transformation: translation=(false false false) orientation=(false false false)
              translation_bounds=0.1 orientation_bounds=1 [radians]
        JMPJoint subtalar_l:
          parent_frame_transformation: translation=(false true true) orientation=(false true false)
              translation_bounds=0.1 orientation_bounds=1
          child_frame_transformation: translation=(true true true) orientation=(false true true) translation_bounds=0.1
              orientation_bounds=1
    JMPTask Right Ankle: index=2 marker_file_name=trc/r_ankle.trc
      JMPJointSet:
        JMPJoint ankle_r:
          parent_frame_transformation: translation=(true true false) orientation=(true true false)
              translation_bounds=0.1 orientation_bounds=1
          child_frame_transformation: translation=(false false false) orientation=(false false false)
              translation_bounds=0.1 orientation_bounds=1
        JMPJoint subtalar_r:
          parent_frame_transformation: translation=(false true true) orientation=(false true false)
              translation_bounds=0.1 orientation_bounds=1
          child_frame_transformation: translation=(true true true) orientation=(false true true) translation_bounds=0.1
              orientation_bounds=1
    JMPTask Left Knee: index=3 marker_file_name=trc/l_knee.trc
      JMPJointSet:
        JMPJoint knee_l:
          parent_frame_transformation: translation=(true true false) orientation=(true true false)
              translation_bounds=0.1 orientation_bounds=1
          child_frame_transformation: translation=(true true true) orientation=(true true false) translation_bounds=0.1
              orientation_bounds=1
    JMPTask Right Knee: index=4 marker_file_name=trc/r_knee.trc
      JMPJointSet:
        JMPJoint knee_r:
          parent_frame_transformation: translation=(true true false) orientation=(true true false)
              translation_bounds=0.1 orientation_bounds=1
          child_frame_transformation: translation=(true true true) orientation=(true true false) translation_bounds=0.1
              orientation_bounds=1
    JMPTask Right Hip: index=5 marker_file_name=trc/r_hip.trc
      JMPJointSet:
        JMPJoint hip_r:
          parent_frame_transformation: translation=(true true true) orientation=(false false false)
              translation_bounds=0.1 orientation_bounds=1
          child_frame_transformation: translation=(false false false) orientation=(false false false)
              translation_bounds=0.1 orientation_bounds=1
    JMPTask Left Hip: index=6 marker_file_name=trc/l_hip.trc
      JMPJointSet:
        JMPJoint hip_l:
          parent_frame_transformation: translation=(true true true) orientation=(false false false)
              translation_bounds=0.1 orientation_bounds=1
          child_frame_transformation: translation=(false false false) orientation=(false false false)
              translation_bounds=0.1 orientation_bounds=1
