# OpenSim document version 40000
InverseKinematicsTool:
  results_directory: ./
  constraint_weight: Inf
  accuracy: 1e-6
  marker_file: gait_3_strides.trc
  time_range: 43.293 46.533
  report_errors: true
  report_marker_locations: false
  IKTaskSet:
    IKMarkerTask R.Asis: apply=true weight=1
    IKMarkerTask L.Asis: apply=true weight=1
    IKMarkerTask Sacral: apply=true weight=1
    IKMarkerTask R.Thigh.Superior: apply=true weight=1
    IKMarkerTask R.Thigh.Inferior: apply=true weight=1
    IKMarkerTask R.Thigh.Lateral: apply=true weight=1
    IKMarkerTask R.Shank.Superior: apply=true weight=1
    IKMarkerTask R.Shank.Inferior: apply=true weight=1
    IKMarkerTask R.Shank.Lateral: apply=true weight=1
    IKMarkerTask R.Heel: apply=true weight=1
    IKMarkerTask R.Midfoot.Superior: apply=true weight=1
    IKMarkerTask R.Midfoot.Lateral: apply=true weight=1
