# OpenSim document version 40000
JointModelPersonalizationTool:
  input_model_file: models/UF_Subject_3_v4.osim
  output_model_file: UF_Subject_3_v5.osim
  results_directory: output_models
  allowable_error: 0.005
  accuracy: 1e-6
  diff_min_change: 1e-4
  optimality_tolerance: 1e-4
  function_tolerance: 1e-4
  step_tolerance: 1e-6
  max_function_evaluations: 200
  JMPTaskList:
    JMPTask Left Ankle: is_enabled=true index=1 marker_file_name=trc_files/LAnkleTrial_markers_jmp.trc
      JMPJointSet:
        JMPJoint ankle_l:
          parent_frame_transformation: translation=(false false false) orientation=(true true false)
              translation_bounds=0.1 orientation_bounds=1 [radians]
          child_frame_transformation: translation=(false false false) orientation=(false false false)
              translation_bounds=0.1 orientation_bounds=1 [radians]
        JMPJoint subtalar_l:
          parent_frame_transformation: translation=(false true false) orientation=(false true false)
              translation_bounds=0.1 orientation_bounds=1
          child_frame_transformation: translation=(true true true) orientation=(false true true) translation_bounds=0.1
              orientation_bounds=1
      JMPBodySet:
        JMPBody tibia_l: scale_body=false move_markers=(false false false)
        JMPBody talus_l: scale_body=false move_markers=(false false false)
        JMPBody calcn_l: scale_body=false move_markers=(false false false)
