# OpenSim document version 40000
JointStructurePersonalizationTool:
  input_model_file: Rajagopal_4.0_RCNL_markers_scaled.osim
  output_model_file: Rajagopal_4.0_RCNL_markers_scaled_all_isolated.osim
  desired_error: 0.01
  accuracy: 1e-6
  diff_min_change: 1e-4
  optimality_tolerance: 1e-6
  function_tolerance: 1e-6
  step_tolerance: 1e-6
  max_function_evaluations: 3e3
  JSPTaskList:
    JSPTask Left Ankle: is_enabled=true marker_file_name=trc/l_ankle.trc
      JSPJoint ankle_l:
        parent_frame_transformation: translation=(true true false) orientation=(true true false) translation_bounds=0.1
            orientation_bounds=1 [radians]
        child_frame_transformation: translation=(false false false) orientation=(false false false)
            translation_bounds=0.1 orientation_bounds=1 [radians]
      JSPJoint subtalar_l:
        parent_frame_transformation: translation=(false true true) orientation=(false true false)
            translation_bounds=0.1 orientation_bounds=1
        child_frame_transformation: translation=(true true true) orientation=(false true true) translation_bounds=0.1
            orientation_bounds=1
    JSPTask Right Ankle: is_enabled=true marker_file_name=trc/r_ankle.trc
      JSPJoint ankle_r:
        parent_frame_transformation: translation=(true true false) orientation=(true true false) translation_bounds=0.1
            orientation_bounds=1
        child_frame_transformation: translation=(false false false) orientation=(false false false)
            translation_bounds=0.1 orientation_bounds=1
      JSPJoint subtalar_r:
        parent_frame_transformation: translation=(false true true) orientation=(false true false)
            translation_bounds=0.1 orientation_bounds=1
        child_frame_transformation: translation=(true true true) orientation=(false true true) translation_bounds=0.1
            orientation_bounds=1
    JSPTask Left Knee: is_enabled=true marker_file_name=trc/l_knee.trc
      JSPJoint knee_l:
        parent_frame_transformation: translation=(true true false) orientation=(true true false) translation_bounds=0.1
            orientation_bounds=1
        child_frame_transformation: translation=(true true true) orientation=(true true false) translation_bounds=0.1
            orientation_bounds=1
    JSPTask Right Knee: is_enabled=true marker_file_name=trc/r_knee.trc
      JSPJoint knee_r:
        parent_frame_transformation: translation=(true true false) orientation=(true true false) translation_bounds=0.1
            orientation_bounds=1
        child_frame_transformation: translation=(true true true) orientation=(true true false) translation_bounds=0.1
            orientation_bounds=1
    JSPTask Right Hip: is_enabled=true marker_file_name=trc/r_hip.trc
      JSPJoint hip_r:
        parent_frame_transformation: translation=(true true true) orientation=(false false false)
            translation_bounds=0.1 orientation_bounds=1
        child_frame_transformation: translation=(false false false) orientation=(false false false)
            translation_bounds=0.1 orientation_bounds=1
    JSPTask Left Hip: is_enabled=true marker_file_name=trc/l_hip.trc
      JSPJoint hip_l:
        parent_frame_transformation: translation=(true true true) orientation=(false false false)
            translation_bounds=0.1 orientation_bounds=1
        child_frame_transformation: translation=(false false false) orientation=(false false false)
            translation_bounds=0.1 orientation_bounds=1
