# OpenSim document version 40000
JointStructurePersonalizationTool:
  input_model_file: Rajagopal_4.0_RCNL_markers_scaled_gait_2.osim
  output_model_file: Rajagopal_4.0_RCNL_markers_scaled_gait_3.osim
  desired_error: 0.01
  accuracy: 1e-6
  diff_min_change: 1e-4
  optimality_tolerance: 1e-6
  function_tolerance: 1e-6
  step_tolerance: 1e-6
  max_function_evaluations: 9e3
  JSPTaskList:
    JSPTask Gait: is_enabled=true marker_file_name=trc/gait_3_strides.trc
      JSPJoint ankle_r:
        parent_frame_transformation: translation=(true true false) orientation=(true true false)
            translation_bounds=0.03 orientation_bounds=0.5 [radians]
        child_frame_transformation: translation=(false false false) orientation=(false false false)
            translation_bounds=0.1 orientation_bounds=0.5 [radians]
      JSPJoint subtalar_r:
        parent_frame_transformation: translation=(false true true) orientation=(false true false)
            translation_bounds=0.1 orientation_bounds=0.5
        child_frame_transformation: translation=(true true true) orientation=(false true true) translation_bounds=0.1
            orientation_bounds=0.5
      JSPJoint ankle_l:
        parent_frame_transformation: translation=(true true false) orientation=(true true false) translation_bounds=0.1
            orientation_bounds=0.5
        child_frame_transformation: translation=(false false false) orientation=(false false false)
            translation_bounds=0.1 orientation_bounds=0.5
      JSPJoint subtalar_l:
        parent_frame_transformation: translation=(false true true) orientation=(false true false)
            translation_bounds=0.1 orientation_bounds=0.5
        child_frame_transformation: translation=(true true true) orientation=(false true true) translation_bounds=0.1
            orientation_bounds=0.5
      JSPJoint knee_r:
        parent_frame_transformation: translation=(true true false) orientation=(true true false) translation_bounds=0.1
            orientation_bounds=0.5
        child_frame_transformation: translation=(true true true) orientation=(true true false) translation_bounds=0.1
            orientation_bounds=0.5
      JSPJoint knee_l:
        parent_frame_transformation: translation=(true true false) orientation=(true true false) translation_bounds=0.1
            orientation_bounds=0.5
        child_frame_transformation: translation=(true true true) orientation=(true true false) translation_bounds=0.1
            orientation_bounds=0.5
      JSPJoint hip_r:
        parent_frame_transformation: translation=(true true false) orientation=(false false false)
            translation_bounds=0.1 orientation_bounds=0.5
        child_frame_transformation: translation=(true true false) orientation=(false false false)
            translation_bounds=0.1 orientation_bounds=0.5
      JSPJoint hip_l:
        parent_frame_transformation: translation=(true true false) orientation=(false false false)
            translation_bounds=0.1 orientation_bounds=0.5
        child_frame_transformation: translation=(true true false) orientation=(false false false)
            translation_bounds=0.1 orientation_bounds=0.5
