# OpenSim document version 40000
JointStructurePersonalizationTool:
  input_model_file: simple_arm_translated_away.osim
  output_model_file: translation_result_from_xml.osim
  desired_error: 0.01
  accuracy: 1e-6
  diff_min_change: 1e-4
  optimality_tolerance: 1e-6
  function_tolerance: 1e-6
  step_tolerance: 1e-6
  max_function_evaluations: 3e3
  JSPTaskList:
    JSPTask Right Elbow: is_enabled=true marker_file_name=simple_arm.trc
      JSPJoint r_elbow:
        parent_frame_transformation: translation=(true false false) orientation=(false false false)
            translation_bounds=0.1 orientation_bounds=1 [radians]
        child_frame_transformation: translation=(false false false) orientation=(false false false)
            translation_bounds=0.1 orientation_bounds=1 [radians]
