# OpenSim document version 40000
GroundContactPersonalizationTool:
  results_directory: gcpResults
  input_osimx_file: mtpResults/UF_Subject_3_reduced_muscles_mtp.osimx
  input_directory: preprocessed
  input_model_file: UF_Subject_3_reduced_muscles.osim
  input_motion_file: IKData/gait_1.sto
  input_grf_file: GRFData/gait_1.sto
  kinematics_filter_cutoff: 10
  initialize_resting_spring_length: true
  grid_width: 5
  grid_height: 15
  initial_resting_spring_length: 0.05
  initial_spring_constant: 2500
  initial_damping_factor: 1e-4
  initial_dynamic_friction_coefficient: 0
  initial_viscous_friction_coefficient: 3
  latching_velocity: 0.05
  diff_min_change: 1e-6
  step_tolerance: 1e-3
  optimality_tolerance: 1e-1
  function_tolerance: 1e-6
  max_iterations: 400
  max_function_evaluations: 3e5
  GCPContactSurfaceSet:
    GCPContactSurface: is_enabled=true is_left_foot=false start_time=0.5 end_time=1.6 belt_speed=1.4
        force_columns=(ground_force_2_vx ground_force_2_vy ground_force_2_vz)
        moment_columns=(ground_moment_2_mx ground_moment_2_my ground_moment_2_mz)
        electrical_center_columns=(ground_force_2_px ground_force_2_py ground_force_2_pz) toe_coordinate=mtp_angle_r
        toe_joint=mtp_r toe_marker=R_Toe medial_marker=R_Toe_Medial lateral_marker=R_Toe_Lateral heel_marker=R_Heel
        midfoot_superior_marker=R_Midfoot_Superior
  GCPTaskList:
    GCPTask: is_enabled=true index=1 springConstants=true dampingFactor=false dynamicFrictionCoefficient=false
        viscousFrictionCoefficient=true restingSpringLength=true kinematicsBSplineCoefficients=true
        neighborStandardDeviation=0.2
      # Design variables to include for the task are listed below
      RCNLCostTermSet:
        RCNLCostTerm: type=marker_position is_enabled=true max_allowable_error=0.005
        RCNLCostTerm: type=rotation is_enabled=true max_allowable_error=1
        RCNLCostTerm: type=translation is_enabled=false max_allowable_error=0.01
        RCNLCostTerm: type=vertical_grf is_enabled=true max_allowable_error=5
        RCNLCostTerm: type=horizontal_grf is_enabled=true max_allowable_error=20
        RCNLCostTerm: type=ground_reaction_moment is_enabled=true max_allowable_error=10
        RCNLCostTerm: type=neighbor_spring_constant is_enabled=true max_allowable_error=100
    GCPTask: is_enabled=true index=2 springConstants=true dampingFactor=false dynamicFrictionCoefficient=false
        viscousFrictionCoefficient=true restingSpringLength=false kinematicsBSplineCoefficients=true
        neighborStandardDeviation=0.2
      # Design variables to include for the task are listed below
      RCNLCostTermSet:
        RCNLCostTerm: type=marker_position is_enabled=true max_allowable_error=0.005
        RCNLCostTerm: type=rotation is_enabled=true max_allowable_error=1
        RCNLCostTerm: type=translation is_enabled=false max_allowable_error=0.01
        RCNLCostTerm: type=vertical_grf is_enabled=true max_allowable_error=5
        RCNLCostTerm: type=horizontal_grf is_enabled=true max_allowable_error=5
        RCNLCostTerm: type=ground_reaction_moment is_enabled=true max_allowable_error=10
        RCNLCostTerm: type=neighbor_spring_constant is_enabled=true max_allowable_error=100
    GCPTask: is_enabled=true index=3 springConstants=true dampingFactor=false dynamicFrictionCoefficient=false
        viscousFrictionCoefficient=true restingSpringLength=false kinematicsBSplineCoefficients=true
        neighborStandardDeviation=0.2
      # Design variables to include for the task are listed below
      RCNLCostTermSet:
        RCNLCostTerm: type=marker_position is_enabled=true max_allowable_error=0.005
        RCNLCostTerm: type=rotation is_enabled=true max_allowable_error=1
        RCNLCostTerm: type=translation is_enabled=false max_allowable_error=0.01
        RCNLCostTerm: type=vertical_grf is_enabled=true max_allowable_error=5
        RCNLCostTerm: type=horizontal_grf is_enabled=true max_allowable_error=5
        RCNLCostTerm: type=ground_reaction_moment is_enabled=true max_allowable_error=2
        RCNLCostTerm: type=neighbor_spring_constant is_enabled=true max_allowable_error=100
