# OpenSim document version 40000
JointModelPersonalizationTool:
  input_model_file: UF_Subject_3_reduced_muscles.osim
  output_model_file: UF_Subject_3_reduced_muscles_JMP.osim
  allowable_error: 0.01
  accuracy: 1e-6
  diff_min_change: 1e-4
  optimality_tolerance: 1e-6
  function_tolerance: 1e-6
  step_tolerance: 1e-6
  max_function_evaluations: 3e3
  JMPTaskList:
    JMPTask Lower body: is_enabled=true index=1 marker_file_name=full_input_data\markers.trc time_range=(0.6 1.7)
      JMPJointSet:
        JMPJoint ankle_r:
          parent_frame_transformation: translation=(true true false) orientation=(true true false)
              translation_bounds=0.03 orientation_bounds=0.5 [radians]
          child_frame_transformation: translation=(false false false) orientation=(false false false)
              translation_bounds=0.03 orientation_bounds=0.5 [radians]
        JMPJoint subtalar_r:
          parent_frame_transformation: translation=(false true false) orientation=(false true false)
              translation_bounds=0.03 orientation_bounds=0.5
          child_frame_transformation: translation=(true true true) orientation=(false true true)
              translation_bounds=0.03 orientation_bounds=0.5
        JMPJoint ankle_l:
          parent_frame_transformation: translation=(true true false) orientation=(true true false)
              translation_bounds=0.03 orientation_bounds=0.5
          child_frame_transformation: translation=(false false false) orientation=(false false false)
              translation_bounds=0.03 orientation_bounds=0.5
        JMPJoint subtalar_l:
          parent_frame_transformation: translation=(false true false) orientation=(false true false)
              translation_bounds=0.03 orientation_bounds=0.5
          child_frame_transformation: translation=(true true true) orientation=(false true true)
              translation_bounds=0.03 orientation_bounds=0.5
        JMPJoint knee_r:
          parent_frame_transformation: translation=(true true false) orientation=(true true false)
              translation_bounds=0.03 orientation_bounds=0.5
          child_frame_transformation: translation=(true true false) orientation=(true true false)
              translation_bounds=0.03 orientation_bounds=0.5
        JMPJoint knee_l:
          parent_frame_transformation: translation=(true true false) orientation=(true true false)
              translation_bounds=0.03 orientation_bounds=0.5
          child_frame_transformation: translation=(true true false) orientation=(true true false)
              translation_bounds=0.03 orientation_bounds=0.5
        JMPJoint hip_r:
          parent_frame_transformation: translation=(true true true) orientation=(false false false)
              translation_bounds=0.03 orientation_bounds=0.5
          child_frame_transformation: translation=(true true true) orientation=(false false false)
              translation_bounds=0.03 orientation_bounds=0.5
        JMPJoint hip_l:
          parent_frame_transformation: translation=(true true true) orientation=(false false false)
              translation_bounds=0.03 orientation_bounds=0.5
          child_frame_transformation: translation=(true true true) orientation=(false false false)
              translation_bounds=0.03 orientation_bounds=0.5
      JMPBodySet:
        JMPBody pelvis: scale_body=true move_markers=(true true true)
        JMPBody femur_l: scale_body=true move_markers=(true false true)
        JMPBody tibia_l: scale_body=true move_markers=(true false true)
        JMPBody calcn_l: scale_body=true move_markers=(false true true)
        JMPBody femur_r: scale_body=true move_markers=(true false true)
        JMPBody tibia_r: scale_body=true move_markers=(true false true)
        JMPBody calcn_r: scale_body=true move_markers=(false true true)
