# OpenSim document version 40000
NeuralControlPersonalizationTool:
  results_directory: ncpResults
  input_osimx_file: simple_arm_muscles.osimx
  input_model_file: simple_arm_muscles.osim
  data_directory: preprocessed
  coordinate_list: r_elbow_flex
  v_max_factor: 10
  activation_muscle_groups: triceps biceps
  normalized_fiber_length_muscle_groups: triceps biceps
  diff_min_change: 1e-6
  step_tolerance: 1e-16
  optimality_tolerance: 1e-3
  function_tolerance: 1e-6
  max_iterations: 1e3
  max_function_evaluations: 1e6
  mtp_results_directory: mtpResults
  # MTP AND NCP SHARED SETTINGS
  MuscleTendonLengthInitialization: is_enabled=true max_normalized_muscle_fiber_length=1
      min_normalized_muscle_fiber_length=0.6 optimize_maximum_muscle_stress=true optimize_isometric_max_force=true
      maximum_muscle_stress=610e3
    RCNLCostTermSet:
      RCNLCostTerm: type=passive_joint_moment is_enabled=false max_allowable_error=2
      RCNLCostTerm: type=optimal_muscle_fiber_length is_enabled=true max_allowable_error=0.3 error_center=1
      RCNLCostTerm: type=tendon_slack_length is_enabled=true max_allowable_error=1 error_center=1
      RCNLCostTerm: type=minimum_normalized_muscle_fiber_length is_enabled=true max_allowable_error=0.3
      RCNLCostTerm: type=maximum_normalized_muscle_fiber_length is_enabled=true max_allowable_error=0.03
      RCNLCostTerm: type=maximum_muscle_stress is_enabled=true max_allowable_error=0.1 error_center=1.2
      RCNLCostTerm: type=passive_muscle_force is_enabled=true max_allowable_error=0.1
      RCNLCostTerm: type=grouped_normalized_muscle_fiber_length is_enabled=true max_allowable_error=0.1
      RCNLCostTerm: type=grouped_maximum_normalized_muscle_fiber_length is_enabled=true max_allowable_error=0.1
  # END OF MTP AND NCP SHARED SETTINGS
  RCNLSynergySet:
    RCNLSynergy: muscle_group_name=triceps num_synergies=1
    RCNLSynergy: muscle_group_name=biceps num_synergies=1
  RCNLCostTermSet:
    RCNLCostTerm: type=moment_tracking is_enabled=true max_allowable_error=5
    RCNLCostTerm: type=activation_tracking is_enabled=true max_allowable_error=0.01
    RCNLCostTerm: type=activation_minimization is_enabled=true max_allowable_error=0.05
    RCNLCostTerm: type=grouped_activations is_enabled=true max_allowable_error=0.1
    RCNLCostTerm: type=grouped_fiber_lengths is_enabled=true max_allowable_error=0.1
    RCNLCostTerm: type=bilateral_symmetry is_enabled=false max_allowable_error=1e-3
