# OpenSim document version 40000
Model:
  Ground
  BodySet:
    Body calcn_r: mass=1.37532 [kg] mass_center=(0.1064144 0.03192431 0)
        inertia=(0.001744304 0.004859132 0.005108319 0 0 0) meshes=r_foot.vtp
    Body toes_r: mass=0.2383154 mass_center=(0.03681937 0.006384861 -0.01862251)
        inertia=(0.0001245931 0.0002491863 0.001245931 0 0 0) meshes=r_bofoot.vtp
  JointSet:
    PinJoint mtp_r: socket_parent_frame=calcn_r_offset socket_child_frame=toes_r_offset
      Coordinate mtp_angle_r: default_value=0 range=(-0.5235988 0.5235988) clamped=true
      PhysicalOffsetFrame calcn_r_offset: socket_parent=/bodyset/calcn_r
          translation=(0.1902689 -0.002128287 0.001149275) [meters] orientation=(-3.14159 0.619901 0) [radians]
      PhysicalOffsetFrame toes_r_offset: socket_parent=/bodyset/toes_r translation=(0 0 0)
          orientation=(-3.14159 0.619901 0)
    CustomJoint ground_hindfoot: socket_parent_frame=/ground socket_child_frame=/bodyset/calcn_r
      Coordinate Rotation1
      Coordinate Rotation2
      Coordinate Rotation3
      Coordinate Translation1
      Coordinate Translation2: default_value=0.009760186
      Coordinate Translation3
      SpatialTransform:
        TransformAxis rotation1: coordinates=Rotation1 axis=(0 1 0) LinearFunction(coefficients=1 0)
        TransformAxis rotation2: coordinates=Rotation2 axis=(1 0 0) LinearFunction(coefficients=1 0)
        TransformAxis rotation3: coordinates=Rotation3 axis=(0 0 1) LinearFunction(coefficients=1 0)
        TransformAxis translation1: coordinates=Translation1 axis=(1 0 0) LinearFunction(coefficients=1 0)
        TransformAxis translation2: coordinates=Translation2 axis=(0 1 0) LinearFunction(coefficients=1 0)
        TransformAxis translation3: coordinates=Translation3 axis=(0 0 1) LinearFunction(coefficients=1 0)
  ForceSet:
    PointActuator [values shared by the 12 below unless stated]: point=(0 0 0) point_is_global=false
        force_is_global=true optimal_force=1
    PointActuator calcn_r_Fx: body=calcn_r direction=(1 0 0)
    PointActuator calcn_r_Fy: body=calcn_r direction=(0 1 0)
    PointActuator calcn_r_Fz: body=calcn_r direction=(0 0 1)
    PointActuator toes_r_Fx: body=toes_r direction=(1 0 0)
    PointActuator toes_r_Fy: body=toes_r direction=(0 1 0)
    PointActuator toes_r_Fz: body=toes_r direction=(0 0 1)
    TorqueActuator [values shared by the 12 below unless stated]: bodyB=ground torque_is_global=true optimal_force=1
    TorqueActuator calcn_r_Mx: bodyA=calcn_r axis=(1 0 0)
    TorqueActuator calcn_r_My: bodyA=calcn_r axis=(0 1 0)
    TorqueActuator calcn_r_Mz: bodyA=calcn_r axis=(0 0 1)
    TorqueActuator toes_r_Mx: bodyA=toes_r axis=(1 0 0)
    TorqueActuator toes_r_My: bodyA=toes_r axis=(0 1 0)
    TorqueActuator toes_r_Mz: bodyA=toes_r axis=(0 0 1)
    PointActuator: body=calcn_r direction=(1 0 0)
    PointActuator pointactuator_0: body=calcn_r direction=(0 1 0)
    PointActuator pointactuator_1: body=calcn_r direction=(0 0 1)
    PointActuator pointactuator_2: body=toes_r direction=(1 0 0)
    PointActuator pointactuator_3: body=toes_r direction=(0 1 0)
    PointActuator pointactuator_4: body=toes_r direction=(0 0 1)
    TorqueActuator: bodyA=calcn_r axis=(1 0 0)
    TorqueActuator torqueactuator_0: bodyA=calcn_r axis=(0 1 0)
    TorqueActuator torqueactuator_1: bodyA=calcn_r axis=(0 0 1)
    TorqueActuator torqueactuator_2: bodyA=toes_r axis=(1 0 0)
    TorqueActuator torqueactuator_3: bodyA=toes_r axis=(0 1 0)
    TorqueActuator torqueactuator_4: bodyA=toes_r axis=(0 0 1)
  MarkerSet:
    Marker R.Heel: calcn_r (-0.0223884 0.01760997 -0.008902916)
    Marker R.Toe: toes_r (0.07249303 0.01569101 0.01134843)
    Marker R.Midfoot.Lateral: calcn_r (0.05402307 -0.0009344738 0.04565194)
    Marker R.Midfoot.Superior: calcn_r (0.1469769 0.05898181 0.00657462)
    Marker R.Toe.Lateral: calcn_r (0.1754662 -0.0115258 0.06529571)
    Marker R.Toe.Medial: calcn_r (0.1851769 -0.002786777 -0.0448537)
    Marker spring_marker_1: calcn_r (0.1442205 -0.009760186 -0.04191285)
    Marker spring_marker_2: calcn_r (0.1646298 -0.009760186 -0.04038112)
    Marker spring_marker_3: calcn_r (0.1850392 -0.009760186 -0.0388494)
    Marker spring_marker_4: calcn_r (0.2054485 -0.009760186 -0.03731767)
    Marker spring_marker_5: toes_r (0.03558901 -0.009760186 -0.03693522)
    Marker spring_marker_6: calcn_r (-0.0002806135 -0.009760186 -0.03084084)
    Marker spring_marker_7: calcn_r (0.02012874 -0.009760186 -0.02930911)
    Marker spring_marker_8: calcn_r (0.04053808 -0.009760186 -0.02777738)
    Marker spring_marker_9: calcn_r (0.06094743 -0.009760186 -0.02624566)
    Marker spring_marker_10: calcn_r (0.08135678 -0.009760186 -0.02471393)
    Marker spring_marker_11: calcn_r (0.1017661 -0.009760186 -0.0231822)
    Marker spring_marker_12: calcn_r (0.1221755 -0.009760186 -0.02165047)
    Marker spring_marker_13: calcn_r (0.1425848 -0.009760186 -0.02011875)
    Marker spring_marker_14: calcn_r (0.1629942 -0.009760186 -0.01858702)
    Marker spring_marker_15: calcn_r (0.1834035 -0.009760186 -0.01705529)
    Marker spring_marker_16: toes_r (0.013544 -0.009760186 -0.01667284)
    Marker spring_marker_17: toes_r (0.03395335 -0.009760186 -0.01514111)
    Marker spring_marker_18: toes_r (0.0543627 -0.009760186 -0.01360938)
    Marker spring_marker_19: calcn_r (-0.001916268 -0.009760186 -0.009046733)
    Marker spring_marker_20: calcn_r (0.01849308 -0.009760186 -0.007515005)
    Marker spring_marker_21: calcn_r (0.03890243 -0.009760186 -0.005983277)
    Marker spring_marker_22: calcn_r (0.05931178 -0.009760186 -0.004451549)
    Marker spring_marker_23: calcn_r (0.07972113 -0.009760186 -0.002919821)
    Marker spring_marker_24: calcn_r (0.1001305 -0.009760186 -0.001388094)
    Marker spring_marker_25: calcn_r (0.1205398 -0.009760186 0.0001436341)
    Marker spring_marker_26: calcn_r (0.1409492 -0.009760186 0.001675362)
    Marker spring_marker_27: calcn_r (0.1613585 -0.009760186 0.00320709)
    Marker spring_marker_28: calcn_r (0.1817679 -0.009760186 0.004738818)
    Marker spring_marker_29: toes_r (0.01190835 -0.009760186 0.00512127)
    Marker spring_marker_30: toes_r (0.0323177 -0.009760186 0.006652998)
    Marker spring_marker_31: toes_r (0.05272705 -0.009760186 0.008184726)
    Marker spring_marker_32: calcn_r (-0.003551922 -0.009760186 0.01274737)
    Marker spring_marker_33: calcn_r (0.01685743 -0.009760186 0.0142791)
    Marker spring_marker_34: calcn_r (0.03726677 -0.009760186 0.01581083)
    Marker spring_marker_35: calcn_r (0.05767612 -0.009760186 0.01734256)
    Marker spring_marker_36: calcn_r (0.07808547 -0.009760186 0.01887429)
    Marker spring_marker_37: calcn_r (0.09849482 -0.009760186 0.02040601)
    Marker spring_marker_38: calcn_r (0.1189042 -0.009760186 0.02193774)
    Marker spring_marker_39: calcn_r (0.1393135 -0.009760186 0.02346947)
    Marker spring_marker_40: calcn_r (0.1597229 -0.009760186 0.0250012)
    Marker spring_marker_41: toes_r (-0.01013665 -0.009760186 0.02538365)
    Marker spring_marker_42: toes_r (0.01027269 -0.009760186 0.02691538)
    Marker spring_marker_43: toes_r (0.03068204 -0.009760186 0.02844711)
    Marker spring_marker_44: toes_r (0.05109139 -0.009760186 0.02997883)
    Marker spring_marker_45: calcn_r (0.01522177 -0.009760186 0.03607321)
    Marker spring_marker_46: calcn_r (0.03563112 -0.009760186 0.03760494)
    Marker spring_marker_47: calcn_r (0.05604047 -0.009760186 0.03913666)
    Marker spring_marker_48: calcn_r (0.07644982 -0.009760186 0.04066839)
    Marker spring_marker_49: calcn_r (0.09685917 -0.009760186 0.04220012)
    Marker spring_marker_50: calcn_r (0.1172685 -0.009760186 0.04373185)
    Marker spring_marker_51: calcn_r (0.1376779 -0.009760186 0.04526358)
    Marker spring_marker_52: toes_r (-0.03218166 -0.009760186 0.04564603)
    Marker spring_marker_53: toes_r (-0.01177231 -0.009760186 0.04717776)
    Marker spring_marker_54: toes_r (0.00863704 -0.009760186 0.04870948)
    Marker spring_marker_55: toes_r (0.02904639 -0.009760186 0.05024121)
