# OpenSim document version 40000
GroundContactPersonalizationTool:
  results_directory: gcpResults
  input_osimx_file: gcpResults/UF_Patient3_correctHeight_JMP_MTPGroups_NCPGroups_mtp_ncp_gcp.osimx
  input_directory: input_data
  input_model_file: UF_Patient3_correctHeight_JMP_MTPGroups_NCPGroups.osim
  input_motion_file: Patient3_NormalGait_1pt0_02_Right_01_IK.mot
  input_grf_file: Patient3_NormalGait_1pt0_02_Right_01_GRF.mot
  kinematics_filter_cutoff: 10
  resting_spring_length_initialization_is_enabled: false
  initial_resting_spring_length: -0.0046828
  initial_spring_constant: 2500
  initial_damping_factor: 1e-4
  initial_dynamic_friction_coefficient: 0
  initial_viscous_friction_coefficient: 5.5305
  latching_velocity: 0.05
  diff_min_change: 1e-6
  step_tolerance: 1e-3
  optimality_tolerance: 1e-1
  function_tolerance: 1e-6
  max_iterations: 400
  max_function_evaluations: 3e5
  GCPContactSurfaceSet:
    GCPContactSurface: is_enabled=false is_left_foot=false start_time=0.7 end_time=1.9 belt_speed=1
        force_columns=(F2x F2y F2z) moment_columns=(M2x M2y M2z) electrical_center_columns=(EC2x EC2y EC2z)
        toe_coordinate=mtp_angle_r toe_joint=mtp_r toe_marker=R.Toe medial_marker=R.Toe.Medial
        lateral_marker=R.Toe.Lateral heel_marker=R.Heel midfoot_superior_marker=R.Midfoot.Superior
    GCPContactSurface: is_enabled=true is_left_foot=true start_time=0.7 end_time=1.9 belt_speed=1
        force_columns=(F1x F1y F1z) moment_columns=(M1x M1y M1z) electrical_center_columns=(EC1x EC1y EC1z)
        toe_coordinate=mtp_angle_l toe_joint=mtp_l toe_marker=L.Toe medial_marker=L.Toe.Medial
        lateral_marker=L.Toe.Lateral heel_marker=L.Heel midfoot_superior_marker=L.Midfoot.Superior
  GCPTaskList:
    GCPTask: is_enabled=true index=1 springConstants=true dampingFactor=false dynamicFrictionCoefficient=false
        viscousFrictionCoefficient=false restingSpringLength=false kinematicsBSplineCoefficients=true
        neighborStandardDeviation=0.2
      # Design variables to include for the task are listed below
      RCNLCostTermSet:
        RCNLCostTerm: type=marker_position is_enabled=true max_allowable_error=0.005
        RCNLCostTerm: type=rotation is_enabled=true max_allowable_error=1
        RCNLCostTerm: type=translation is_enabled=false max_allowable_error=0.01
        RCNLCostTerm: type=vertical_grf is_enabled=true max_allowable_error=5
        RCNLCostTerm: type=horizontal_grf is_enabled=true max_allowable_error=20
        RCNLCostTerm: type=ground_reaction_moment is_enabled=true max_allowable_error=10
        RCNLCostTerm: type=neighbor_spring_constant is_enabled=true max_allowable_error=100
    GCPTask: is_enabled=true index=2 springConstants=true dampingFactor=false dynamicFrictionCoefficient=false
        viscousFrictionCoefficient=false restingSpringLength=false kinematicsBSplineCoefficients=true
        neighborStandardDeviation=0.2
      # Design variables to include for the task are listed below
      RCNLCostTermSet:
        RCNLCostTerm: type=marker_position is_enabled=true max_allowable_error=0.005
        RCNLCostTerm: type=rotation is_enabled=true max_allowable_error=1
        RCNLCostTerm: type=translation is_enabled=false max_allowable_error=0.01
        RCNLCostTerm: type=vertical_grf is_enabled=true max_allowable_error=5
        RCNLCostTerm: type=horizontal_grf is_enabled=true max_allowable_error=5
        RCNLCostTerm: type=ground_reaction_moment is_enabled=true max_allowable_error=10
        RCNLCostTerm: type=neighbor_spring_constant is_enabled=true max_allowable_error=100
    GCPTask: is_enabled=true index=3 springConstants=true dampingFactor=false dynamicFrictionCoefficient=false
        viscousFrictionCoefficient=false restingSpringLength=false kinematicsBSplineCoefficients=true
        neighborStandardDeviation=0.2
      # Design variables to include for the task are listed below
      RCNLCostTermSet:
        RCNLCostTerm: type=marker_position is_enabled=true max_allowable_error=0.005
        RCNLCostTerm: type=rotation is_enabled=true max_allowable_error=1
        RCNLCostTerm: type=translation is_enabled=false max_allowable_error=0.01
        RCNLCostTerm: type=vertical_grf is_enabled=true max_allowable_error=5
        RCNLCostTerm: type=horizontal_grf is_enabled=true max_allowable_error=5
        RCNLCostTerm: type=ground_reaction_moment is_enabled=true max_allowable_error=2
        RCNLCostTerm: type=neighbor_spring_constant is_enabled=true max_allowable_error=100
