# OpenSim document version 40000
MuscleTendonPersonalizationTool:
  results_directory: mtpResults
  input_model_file: UF_Patient3_correctHeight_JMP_MTPGroups_NCPGroups.osim
  data_directory: preprocessed
  coordinate_list: hip_flexion_r hip_adduction_r hip_rotation_r knee_angle_r ankle_angle_r subtalar_angle_r
  v_max_factor: 10
  activation_muscle_groups: AdductorActivationGroupR GluteusMaxActivationGroupR GluteusMedActivationGroupR GluteusMinActivationGroupR IliopsoasActivationGroupR HamstringActivationGroupR BicepsFemActivationGroupR PeroneusActivationGroupR
  normalized_fiber_length_muscle_groups: AdductorFiberLengthGroupR GluteusMaxFiberLengthGroupR GluteusMedFiberLengthGroupR GluteusMinFiberLengthGroupR QuadricepFiberLengthGroupR HamstringFiberLengthGroupR PeroneusFiberLengthGroupR IliopsoasFiberLengthGroupR GastrocFiberLengthGroupR TibialisAnteriorFiberLengthGroupR TibialisPosteriorFiberLengthGroupR
  missing_emg_channel_muscle_groups: IliopsoasMissingEmgChannelR QuadfemMissingEmgChannelR
  collected_emg_channel_muscle_groups: AddMag AddLong BicFemLong BicFemShort ExtDigLong ExtHalLong FlexDigLong FlexHalLong GasMed GasLat GlutMaxLat GlutMaxMed GlutMed Gracilis PeroneusLong RecFem Sartorius SemiMemb SemiTend Sol TenFascLat TibAnt TibPost VastInt VastLat VastMed
  trial_prefixes: gait_1
  max_iterations: 1e4
  max_function_evaluations: 1e8
  step_tolerance: 1e-16
  MuscleTendonLengthInitialization: is_enabled=true passive_data_input_directory=thelen_r
      max_normalized_muscle_fiber_length=1 min_normalized_muscle_fiber_length=0.6 optimize_maximum_muscle_stress=true
      optimize_isometric_max_force=true maximum_muscle_stress=610e3
    RCNLCostTermSet:
      RCNLCostTerm: type=passive_joint_moment is_enabled=true max_allowable_error=2
      RCNLCostTerm: type=optimal_muscle_fiber_length is_enabled=true max_allowable_error=0.3 error_center=1
      RCNLCostTerm: type=tendon_slack_length is_enabled=true max_allowable_error=1 error_center=1
      RCNLCostTerm: type=minimum_normalized_muscle_fiber_length is_enabled=true max_allowable_error=0.3
      RCNLCostTerm: type=maximum_normalized_muscle_fiber_length is_enabled=true max_allowable_error=0.03
      RCNLCostTerm: type=maximum_muscle_stress is_enabled=true max_allowable_error=0.1 error_center=1.2
      RCNLCostTerm: type=passive_muscle_force is_enabled=true max_allowable_error=0.1
      RCNLCostTerm: type=grouped_normalized_muscle_fiber_length is_enabled=true max_allowable_error=0.1
      RCNLCostTerm: type=grouped_maximum_normalized_muscle_fiber_length is_enabled=true max_allowable_error=0.1
  # Synergy Extrapolation Settings
  MTPSynergyExtrapolation: is_enabled=true task_prefixes=gait_1 matrix_factorization_method=PCA number_of_synergies=5
      synergy_extrapolation_categorization=trial residual_categorization=task
    RCNLCostTermSet:
      RCNLCostTerm: type=inverse_dynamics_joint_moment is_enabled=true max_allowable_error=2
      RCNLCostTerm: type=measured_inverse_dynamics_joint_moment is_enabled=true max_allowable_error=2.5
      RCNLCostTerm: type=extrapolated_muscle_activation is_enabled=true max_allowable_error=0.3
      RCNLCostTerm: type=residual_muscle_activation is_enabled=true max_allowable_error=0.3
  MTPTaskList:
    MTPTask: is_enabled=true index=1 muscle_specific_electromechanical_delays=false
      RCNLCostTermSet:
        # THIS IS THE FIRST SECTION
        RCNLCostTerm: type=inverse_dynamics_joint_moment is_enabled=true max_allowable_error=2
        RCNLCostTerm: type=activation_time_constant is_enabled=true max_allowable_error=0.02 error_center=0.015
        RCNLCostTerm: type=activation_nonlinearity_constant is_enabled=true max_allowable_error=0.1
        # THIS IS THE SECOND SECTION
        RCNLCostTerm: type=optimal_muscle_fiber_length is_enabled=true max_allowable_error=0.1
        RCNLCostTerm: type=tendon_slack_length is_enabled=true max_allowable_error=0.1
        RCNLCostTerm: type=emg_scale_factor is_enabled=true max_allowable_error=0.2 error_center=0.3
        RCNLCostTerm: type=normalized_muscle_fiber_length is_enabled=true max_allowable_error=0.1
        RCNLCostTerm: type=passive_muscle_force is_enabled=true max_allowable_error=50
        RCNLCostTerm: type=grouped_normalized_muscle_fiber_length is_enabled=true max_allowable_error=0.05
        RCNLCostTerm: type=grouped_emg_scale_factor is_enabled=true max_allowable_error=0.1
        RCNLCostTerm: type=grouped_electromechanical_delay is_enabled=true max_allowable_error=0.2
