# OpenSim document version 40000
NeuralControlPersonalizationTool:
  results_directory: ncpResults
  input_osimx_file: mtpResults/UF_Patient3_correctHeight_JMP_MTPGroups_NCPGroups_mtp.osimx
  input_model_file: UF_Patient3_correctHeight_JMP_MTPGroups_NCPGroups.osim
  data_directory: preprocessed
  coordinate_list: hip_flexion_r hip_adduction_r hip_rotation_r knee_angle_r ankle_angle_r subtalar_angle_r mtp_angle_r hip_flexion_l hip_adduction_l hip_rotation_l knee_angle_l ankle_angle_l subtalar_angle_l mtp_angle_l lumbar_bending lumbar_extension lumbar_rotation thoracic_extension thoracic_bending thoracic_rotation
  v_max_factor: 10
  activation_muscle_groups: InternalObliquesR ExternalObliquesR ErectorSpinaeR MultifidusR QuadratusLumborumR AdductorsR BicepsFemorisR TibialisAnteriorR FlexorLongusR GastrocR ExternalRotatorsR GluteusMaximusR GluteusMediusR GluteusMinimusR HipFlexorsR SemiHamstringsR QuadricepsR PeroneusR InternalObliquesL ExternalObliquesL ErectorSpinaeL MultifidusL QuadratusLumborumL AdductorsL BicepsFemorisL TibialisAnteriorL FlexorLongusL GastrocL ExternalRotatorsL GluteusMaximusL GluteusMediusL GluteusMinimusL HipFlexorsL SemiHamstringsL QuadricepsL PeroneusL
  normalized_fiber_length_muscle_groups: GluteusMaximusL GluteusMediusL GluteusMinimusL HipFlexorsL PeroneusL GastrocL TibialisAnteriorL TibialisPosteriorL HamstringsFiberLengthL QuadricepsFiberLengthL AdductorFiberLengthL GluteusMaximusR GluteusMediusR GluteusMinimusR HipFlexorsR PeroneusR GastrocR TibialisAnteriorR TibialisPosteriorR HamstringsFiberLengthR QuadricepsFiberLengthR AdductorFiberLengthR
  trial_prefixes: gait_1
  diff_min_change: 1e-6
  step_tolerance: 1e-16
  optimality_tolerance: 1e-3
  function_tolerance: 1e-6
  max_iterations: 1e3
  max_function_evaluations: 1e6
  mtp_results_directory: mtpResults
  # MTP AND NCP SHARED SETTINGS
  MuscleTendonLengthInitialization: is_enabled=true passive_data_input_directory=thelen_l
      max_normalized_muscle_fiber_length=1 min_normalized_muscle_fiber_length=0.6 optimize_maximum_muscle_stress=true
      optimize_isometric_max_force=true maximum_muscle_stress=610e3
    RCNLCostTermSet:
      RCNLCostTerm: type=passive_joint_moment is_enabled=true max_allowable_error=2
      RCNLCostTerm: type=optimal_muscle_fiber_length is_enabled=true max_allowable_error=0.3 error_center=1
      RCNLCostTerm: type=tendon_slack_length is_enabled=true max_allowable_error=1 error_center=1
      RCNLCostTerm: type=minimum_normalized_muscle_fiber_length is_enabled=true max_allowable_error=0.3
      RCNLCostTerm: type=maximum_normalized_muscle_fiber_length is_enabled=true max_allowable_error=0.03
      RCNLCostTerm: type=maximum_muscle_stress is_enabled=true max_allowable_error=0.1 error_center=1.2
      RCNLCostTerm: type=passive_muscle_force is_enabled=true max_allowable_error=0.1
      RCNLCostTerm: type=grouped_normalized_muscle_fiber_length is_enabled=true max_allowable_error=0.1
      RCNLCostTerm: type=grouped_maximum_normalized_muscle_fiber_length is_enabled=true max_allowable_error=0.1
  # END OF MTP AND NCP SHARED SETTINGS
  RCNLSynergySet:
    RCNLSynergy: muscle_group_name=right_side num_synergies=6
    RCNLSynergy: muscle_group_name=left_side num_synergies=6
  RCNLCostTermSet:
    RCNLCostTerm: type=moment_tracking is_enabled=true max_allowable_error=5
    RCNLCostTerm: type=activation_tracking is_enabled=true max_allowable_error=0.01
    RCNLCostTerm: type=activation_minimization is_enabled=true max_allowable_error=0.05
    RCNLCostTerm: type=grouped_activations is_enabled=true max_allowable_error=0.1
    RCNLCostTerm: type=grouped_fiber_lengths is_enabled=true max_allowable_error=0.1
    RCNLCostTerm: type=bilateral_symmetry is_enabled=false max_allowable_error=1e-3
