# OpenSim document version 40000
JointModelPersonalizationTool:
  input_model_file: models/UF_Subject_3_v6.osim
  output_model_file: UF_Subject_3_v7.osim
  results_directory: output_models
  allowable_error: 0.005
  accuracy: 1e-6
  diff_min_change: 1e-4
  optimality_tolerance: 1e-4
  function_tolerance: 1e-4
  step_tolerance: 1e-6
  max_function_evaluations: 300
  JMPTaskList:
    JMPTask Both Legs: is_enabled=true index=1 marker_file_name=trc_files/GaitTrial_markers_jmp.trc
      JMPJointSet:
        JMPJoint hip_r:
          parent_frame_transformation: translation=(false false false) orientation=(false false false)
              translation_bounds=0.1 orientation_bounds=1 [radians]
          child_frame_transformation: translation=(false false false) orientation=(false false false)
              translation_bounds=0.1 orientation_bounds=1 [radians]
        JMPJoint knee_r:
          parent_frame_transformation: translation=(false false false) orientation=(true true false)
              translation_bounds=0.1 orientation_bounds=1
          child_frame_transformation: translation=(false false false) orientation=(true true false)
              translation_bounds=0.1 orientation_bounds=1
        JMPJoint ankle_r:
          parent_frame_transformation: translation=(false false false) orientation=(true true false)
              translation_bounds=0.1 orientation_bounds=1
          child_frame_transformation: translation=(false false false) orientation=(true true false)
              translation_bounds=0.1 orientation_bounds=1
        JMPJoint subtalar_r:
          parent_frame_transformation: translation=(false false false) orientation=(false false false)
              translation_bounds=0.1 orientation_bounds=1
          child_frame_transformation: translation=(false true false) orientation=(false false false)
              translation_bounds=0.1 orientation_bounds=1
        JMPJoint hip_l:
          parent_frame_transformation: translation=(false false false) orientation=(false false false)
              translation_bounds=0.1 orientation_bounds=1
          child_frame_transformation: translation=(false false false) orientation=(false false false)
              translation_bounds=0.1 orientation_bounds=1
        JMPJoint knee_l:
          parent_frame_transformation: translation=(false false false) orientation=(true true false)
              translation_bounds=0.1 orientation_bounds=1
          child_frame_transformation: translation=(false false false) orientation=(true true false)
              translation_bounds=0.1 orientation_bounds=1
        JMPJoint ankle_l:
          parent_frame_transformation: translation=(false false false) orientation=(true true false)
              translation_bounds=0.1 orientation_bounds=1
          child_frame_transformation: translation=(false false false) orientation=(true true false)
              translation_bounds=0.1 orientation_bounds=1
        JMPJoint subtalar_l:
          parent_frame_transformation: translation=(false false false) orientation=(false false false)
              translation_bounds=0.1 orientation_bounds=1
          child_frame_transformation: translation=(false true false) orientation=(false false false)
              translation_bounds=0.1 orientation_bounds=1
      JMPBodySet:
        JMPBody pelvis: scale_body=false move_markers=(false true false)
        JMPBody femur_r: scale_body=true move_markers=(true true false)
        JMPBody tibia_r: scale_body=true move_markers=(true true false)
        JMPBody calcn_r: scale_body=false move_markers=(false false false)
        JMPBody femur_l: scale_body=true move_markers=(true true false)
        JMPBody tibia_l: scale_body=true move_markers=(true true false)
        JMPBody calcn_l: scale_body=false move_markers=(false false false)
