# OpenSim document version 40000
JointModelPersonalizationTool:
  input_model_file: models/UF_Subject_3_v3.osim
  output_model_file: UF_Subject_3_v4.osim
  results_directory: output_models
  allowable_error: 0.005
  accuracy: 1e-6
  diff_min_change: 1e-4
  optimality_tolerance: 1e-4
  function_tolerance: 1e-4
  step_tolerance: 1e-6
  max_function_evaluations: 200
  JMPTaskList:
    JMPTask Right Knee: is_enabled=true index=1 marker_file_name=trc_files/RKneeTrial_markers_jmp.trc
      JMPJointSet:
        JMPJoint knee_r:
          parent_frame_transformation: translation=(false false false) orientation=(true true false)
              translation_bounds=0.1 orientation_bounds=1 [radians]
          child_frame_transformation: translation=(false false false) orientation=(true true false)
              translation_bounds=0.1 orientation_bounds=1 [radians]
      JMPBodySet:
        JMPBody femur_r: scale_body=false move_markers=(false false false)
        JMPBody tibia_r: scale_body=false move_markers=(false false false)
