# OpenSim document version 40000
NeuralControlPersonalizationTool:
  results_directory: ncpResults
  input_osimx_file: mtpResults/UF_Subject_3_v8_mtp.osimx
  input_model_file: UF_Subject_3_v8.osim
  data_directory: preprocessed
  coordinate_list: hip_flexion_r hip_rotation_r hip_adduction_r knee_angle_r ankle_angle_r subtalar_angle_r mtp_angle_r hip_flexion_l hip_rotation_l hip_adduction_l knee_angle_l ankle_angle_l subtalar_angle_l mtp_angle_l
  v_max_factor: 10
  activation_muscle_groups: HipFlexorsActivationGroupR HipAdductorsActivationGroupR HipRotatorsActivationGroupR GlutmaxActivationGroupR GlutmedActivationGroupR GlutminActivationGroupR HamsmedActivationGroupR HamslatActivationGroupR VasActivationGroupR GasActivationGroupR AnkleInvertorsActivationGroupR AnkleEvertorsActivationGroupR ToesExtensorsActivationGroupR HipFlexorsActivationGroupL HipAdductorsActivationGroupL HipRotatorsActivationGroupL GlutmaxActivationGroupL GlutmedActivationGroupL GlutminActivationGroupL HamsmedActivationGroupL HamslatActivationGroupL VasActivationGroupL GasActivationGroupL AnkleInvertorsActivationGroupL AnkleEvertorsActivationGroupL ToesExtensorsActivationGroupL
  normalized_fiber_length_muscle_groups: HipAdductorsNormalizedFiberLengthGroupR GlutmaxNormalizedFiberLengthGroupR GlutmedNormalizedFiberLengthGroupR GlutminNormalizedFiberLengthGroupR HamsNormalizedFiberLengthGroupR VasNormalizedFiberLengthGroupR GasNormalizedFiberLengthGroupR AnkleInvertorsNormalizedFiberLengthGroupR AnkleEvertorsNormalizedFiberLengthGroupR ToesExtensorsNormalizedFiberLengthGroupR HipAdductorsNormalizedFiberLengthGroupL GlutmaxNormalizedFiberLengthGroupL GlutmedNormalizedFiberLengthGroupL GlutminNormalizedFiberLengthGroupL HamsNormalizedFiberLengthGroupL VasNormalizedFiberLengthGroupL GasNormalizedFiberLengthGroupL AnkleInvertorsNormalizedFiberLengthGroupL AnkleEvertorsNormalizedFiberLengthGroupL ToesExtensorsNormalizedFiberLengthGroupL
  trial_prefixes: gait_1
  diff_min_change: 1e-6
  step_tolerance: 1e-16
  optimality_tolerance: 1e-3
  function_tolerance: 1e-6
  max_iterations: 1e3
  max_function_evaluations: 1e6
  mtp_results_directory: mtpResults
  enforce_bilateral_symmetry: false
  # MTP AND NCP SHARED SETTINGS
  MuscleTendonLengthInitialization: is_enabled=true passive_data_input_directory=thelen_l
      max_normalized_muscle_fiber_length=1 min_normalized_muscle_fiber_length=0.6 optimize_maximum_muscle_stress=true
      optimize_isometric_max_force=true maximum_muscle_stress=610e3
    RCNLCostTermSet:
      RCNLCostTerm: type=passive_joint_moment is_enabled=true max_allowable_error=2
      RCNLCostTerm: type=optimal_muscle_fiber_length is_enabled=true max_allowable_error=0.3 error_center=1
      RCNLCostTerm: type=tendon_slack_length is_enabled=true max_allowable_error=1 error_center=1
      RCNLCostTerm: type=minimum_normalized_muscle_fiber_length is_enabled=true max_allowable_error=0.3
      RCNLCostTerm: type=maximum_normalized_muscle_fiber_length is_enabled=true max_allowable_error=0.03
      RCNLCostTerm: type=maximum_muscle_stress is_enabled=true max_allowable_error=0.1 error_center=1.2
      RCNLCostTerm: type=passive_muscle_force is_enabled=true max_allowable_error=0.1
      RCNLCostTerm: type=grouped_normalized_muscle_fiber_length is_enabled=true max_allowable_error=0.1
      RCNLCostTerm: type=grouped_maximum_normalized_muscle_fiber_length is_enabled=true max_allowable_error=0.1
  # END OF MTP AND NCP SHARED SETTINGS
  RCNLSynergySet:
    RCNLSynergy: muscle_group_name=right_leg num_synergies=6
    RCNLSynergy: muscle_group_name=left_leg num_synergies=6
  RCNLCostTermSet:
    RCNLCostTerm: type=moment_tracking is_enabled=true max_allowable_error=5
    RCNLCostTerm: type=activation_tracking is_enabled=true max_allowable_error=0.005
    RCNLCostTerm: type=activation_minimization is_enabled=true max_allowable_error=0.05
    RCNLCostTerm: type=grouped_activations is_enabled=true max_allowable_error=0.1
    RCNLCostTerm: type=grouped_fiber_lengths is_enabled=true max_allowable_error=0.1
